<Lems>

<!-- Initial version in NeuroML v2.0 of a striatal spiny projection neuron (SSPN) model being developed in the lab of Avrama Blackwell -->

<!-- Specify which component to run -->
<Target component="sim1"/>

<!-- Include core NeuroML2 ComponentType definitions -->
<Include file="Cells.xml"/>
<Include file="Networks.xml"/>
<Include file="Simulation.xml"/>
<Include file="naFchanOgeqn.nml"/>

<Include file="kAf_chanREqfact.nml"/>
<Include file="KDr_chanQfact.nml"/>
<Include file="kIR_chanRE2.nml"/>
<Include file="CaR_channel.nml"/>
<Include file="CaPool.nml"/>
  <!--

<Include file="SKchannel.nml"/>
<Include file="kAs_chanREqfact.nml"/>
      Main NeuroML2 content -->

<ionChannelPassive id="passive" conductance="10pS"/>

<cell id="sspn">

    <notes>A test cell containing a number of the channels from the SSPN model</notes>

    <morphology id="morphology_sspn">

        <segment id="0" name="Soma">
            <proximal x="-8" y="0" z="0" diameter="16"/>
            <distal x="8" y="0" z="0" diameter="16"/>
        </segment>

        <segmentGroup id="all">
            <include segmentGroup="Soma"/>
        </segmentGroup>

    </morphology>

    <biophysicalProperties id="biophys">

        <membraneProperties>

            <channelDensity id="leak" ionChannel="passive" condDensity="1 S_per_m2" erev="-60mV" ion="non_specific"/>
            <channelDensity id="naFChans" ionChannel="naF" condDensity="9000 S_per_m2" erev="50mV" ion="na"/>
            <channelDensity id="kAfChans" ionChannel="kAf" condDensity="765.24 S_per_m2" erev="-90mV"  ion="k"/>
            <channelDensity id="kDrChans" ionChannel="KDr" condDensity="6.04 S_per_m2" erev="-90mV"  ion="k"/>
            <channelDensity id="kIRChans" ionChannel="kIR" condDensity="8 S_per_m2" erev="-90mV"  ion="k"/>

            <channelDensity id="CaRChansG" ionChannel="CaR" condDensity="1 S_per_m2" erev="125mV" ion="ca"/>

            <!--

            <channelDensityGHK id="CaRChansG" ionChannel="CaR" permeability="1e-6 m_per_s" ion="ca"/>
<channelDensity id="kAsChans" ionChannel="kAs" condDensity="360.1 S_per_m2" erev="-90mV"  ion="k"/>-->

            <!--

            <channelPopulation id="SKChans" ionChannel="SK" number="1600" erev="-90mV" ion="k"/>

            <channelPopulationNernst id="CaRChansN" ionChannel="CaR" number="16000" ion="ca"/>-->

            <spikeThresh value="0 mV"/>

            <specificCapacitance value="0.03 F_per_m2"/>

            <initMembPotential value="-75.0 mV"/>

        </membraneProperties>

        <intracellularProperties>

            <species id="ca" ion="ca" concentrationModel="CaPool" initialConcentration="15e-5 mM" initialExtConcentration="2 mM"/>

            <resistivity value="0.1 kohm_cm"/>

        </intracellularProperties>

    </biophysicalProperties>

</cell>

<pulseGenerator id="pulseGen1" delay="50ms" duration="50ms" amplitude="0.3 nA" />
<pulseGenerator id="pulseGen2" delay="150ms" duration="50ms" amplitude="-0.01 nA" />

<network id="net1">
    <extracellularProperties temperature="32degC"/>
    <population id="sspnPop" component="sspn" size="1"/>
    <explicitInput target="sspnPop[0]" input="pulseGen1"/>
    <explicitInput target="sspnPop[0]" input="pulseGen2"/>
</network>

        <!-- End of NeuroML2 content -->

<Simulation id="sim1" length="250ms" step="0.01ms" target="net1">

    <Display id="d1" title="AB example: Voltage" timeScale="1ms" xmin="0" xmax="250" ymin="-90" ymax="60">
        <Line id="v" quantity="sspnPop[0]/v" scale="1mV"  color="#ffffff"  timeScale="1ms"/>
    </Display>

     <Display id="d2" title="AB example: rate variables" timeScale="1ms"  xmin="0" xmax="250" ymin="-0.1" ymax="1.1">

        <Line id="naF_m" quantity="sspnPop[0]/biophys/membraneProperties/naFChans/naF/m/q" scale="1"  color="#000000" timeScale="1ms"/>
        <Line id="naF_h" quantity="sspnPop[0]/biophys/membraneProperties/naFChans/naF/h/q" scale="1"  color="#ff0000" timeScale="1ms"/>
        <Line id="kAf_m" quantity="sspnPop[0]/biophys/membraneProperties/kAfChans/kAf/m/q" scale="1"  color="#0000ff" timeScale="1ms"/>
        <Line id="kAf_h" quantity="sspnPop[0]/biophys/membraneProperties/kAfChans/kAf/h/q" scale="1"  color="#00ffff" timeScale="1ms"/>
        <Line id="KDr_m" quantity="sspnPop[0]/biophys/membraneProperties/kDrChans/KDr/m/q" scale="1"  color="#ff00ff" timeScale="1ms"/>
        <Line id="kIR_m" quantity="sspnPop[0]/biophys/membraneProperties/kIRChans/kIR/m/q" scale="1"  color="#3f0aaf" timeScale="1ms"/>
        <Line id="CaR_m" quantity="sspnPop[0]/biophys/membraneProperties/CaRChansG/CaR/m/q" scale="1"  color="#668800" timeScale="1ms"/>
        <Line id="CaR_h" quantity="sspnPop[0]/biophys/membraneProperties/CaRChansG/CaR/h/q" scale="1"  color="#007700" timeScale="1ms"/>
        <!--<Line id="l8" quantity="sspnPop[0]/biophys/membraneProperties/kAsChans/kAs/m/q" scale="1"  color="#472910" timeScale="1ms"/>
        <Line id="l9" quantity="sspnPop[0]/biophys/membraneProperties/kAsChans/kAs/h/q" scale="1"  color="#173456" timeScale="1ms"/>
        !--
        <Line id="l12" quantity="sspnPop[0]/biophys/membraneProperties/SKChans/SK/m/q" scale="1"  color="#777700" timeScale="1ms"/>-- -->
    </Display>

    <Display id="d4" title="AB example: small currents" timeScale="1ms" xmin="0" xmax="250" ymin="-0.1" ymax="1.1">
        <Line id="li2" quantity="sspnPop[0]/biophys/membraneProperties/naFChans/iDensity" scale="1mA_per_cm2"  color="#00aa00"   timeScale="1ms"/>
        <Line id="li3" quantity="sspnPop[0]/biophys/membraneProperties/kAfChans/iDensity" scale="1mA_per_cm2"   color="#00aaaa" timeScale="1ms"/>
        <Line id="li4" quantity="sspnPop[0]/biophys/membraneProperties/kDrChans/iDensity" scale="1mA_per_cm2"   color="#aa00aa" timeScale="1ms"/>
        <Line id="li5" quantity="sspnPop[0]/biophys/membraneProperties/kIRChans/iDensity" scale="1mA_per_cm2"  color="#3a0f3a" timeScale="1ms"/>
        <!--<Line id="li6" quantity="sspnPop[0]/biophys/membraneProperties/kAsChans/iDensity" scale="1mA_per_cm2"  color="#4444aa" timeScale="1ms"/>-->
    </Display>

<!--
    <Display id="d3" title="AB example: large currents" timeScale="1ms">
        <Line id="li1" quantity="sspnPop[0]/pulseGen1/i" scale="1nA"  color="#000000" save="i.dat"/>
        !--<Line id="li6" quantity="sspnPop[0]/biophys/membraneProperties/SKChans/iDensity" scale="1mA_per_cm2"  color="#777700" timeScale="1ms"/>
        <Line id="li5" quantity="sspnPop[0]/biophys/membraneProperties/CaRChansN/iDensity" scale="1mA_per_cm2"  color="#007700" timeScale="1ms"/>--
    </Display>-->

    <Display id="d5" title="AB example: concentration" timeScale="1ms" xmin="0" xmax="250" ymin="4e-5" ymax="15e-5">
        <!--<Line id="li11" quantity="sspnPop[0]/caConcExt" scale="1 mM"  color="#ff00ff" timeScale="1ms"/>-->
        <Line id="li12" quantity="sspnPop[0]/caConc" scale="1 mM"  color="#ffffff" timeScale="1ms"/>
    </Display>

<!--
    <Display id="d6" title="AB example: effective reversal potential" timeScale="1ms">
        <Line id="li14n" quantity="sspnPop[0]/biophys/membraneProperties/CaRChansN/erev" scale="1 mV"  color="#ff00ff" timeScale="1ms"/>
        <Line id="li14g" quantity="sspnPop[0]/biophys/membraneProperties/CaRChansG/erevEff" scale="1 mV"  color="#ffffff" timeScale="1ms"/>
    </Display>-->

</Simulation>

</Lems>
