<Lems>

<!-- Initial version in NeuroML v2.0 of a striatal spiny projection neuron (SSPN) model being developed in the lab of Avrama Blackwell -->

<!-- Specify which component to run -->
<Target component="sim1"/>

<!-- Include core NeuroML2 ComponentClass definitions -->
<Include file="Cells.xml"/>
<Include file="Networks.xml"/>
<Include file="Simulation.xml"/>

<Include file="kAf_chanREqfact.nml"/>
<Include file="kAs_chanREqfact.nml"/>

<Include file="naFchanOgeqn.nml"/>
<Include file="KDr_chanQfact.nml"/>
<Include file="kIR_chanRE2.nml"/>
<Include file="CaR_channel.nml"/>
<Include file="CaPool.nml"/>

<!-- Include core NeuroML2 ComponentClass definitions -->
<Include file="MScellLems.nml"/>

<pulseGenerator id="pulseGen1" delay="50ms" duration="250ms" amplitude="0.3 nA" />
<pulseGenerator id="pulseGen2" delay="450ms" duration="250ms" amplitude="-0.5 nA" />

<network id="net1" type="networkWithTemperature" temperature="32.0 degC">
    <population id="sspnPop" component="sspn1comp" size="1"/>
    <explicitInput target="sspnPop[0]" input="pulseGen1"/>
    <explicitInput target="sspnPop[0]" input="pulseGen2"/>
</network>

<Simulation id="sim1" length="250ms" step="0.01ms" target="net1">

    <Display id="d1" title="AB example: Voltage" timeScale="1ms" xmin="-20" xmax="270" ymin="-100" ymax="-10" >
        <Line id="v" quantity="sspnPop[0]/v" scale="1mV" color="#ffffff" timeScale="1ms"/>
    </Display>

     <Display id="d2" title="AB example: rate variables" timeScale="1ms" xmin="-20" xmax="270" ymin="-0.1" ymax="1.1">

        <Line id="naF_m" quantity="sspnPop[0]/biophys/membraneProperties/naFChans/naF/m/q" scale="1"  color="#000000" timeScale="1ms"/>
        <Line id="naF_h" quantity="sspnPop[0]/biophys/membraneProperties/naFChans/naF/h/q" scale="1"  color="#ff0000" timeScale="1ms"/>
        <Line id="kAf_m" quantity="sspnPop[0]/biophys/membraneProperties/kAfChans/kAf/m/q" scale="1"  color="#0000ff" timeScale="1ms"/>
        <Line id="kAf_h" quantity="sspnPop[0]/biophys/membraneProperties/kAfChans/kAf/h/q" scale="1"  color="#00ffff" timeScale="1ms"/>
        <Line id="KDr_m" quantity="sspnPop[0]/biophys/membraneProperties/kDrChans/KDr/m/q" scale="1"  color="#ff00ff" timeScale="1ms"/>
        <Line id="kIR_m" quantity="sspnPop[0]/biophys/membraneProperties/kIRChans/kIR/m/q" scale="1"  color="#3f0aaf" timeScale="1ms"/>
        <Line id="kAs_m" quantity="sspnPop[0]/biophys/membraneProperties/kAsChans/kAs/m/q" scale="1"  color="#472910" timeScale="1ms"/>
        <Line id="kAs_h" quantity="sspnPop[0]/biophys/membraneProperties/kAsChans/kAs/h/q" scale="1"  color="#173456" timeScale="1ms"/>
        <Line id="CaR_m" quantity="sspnPop[0]/biophys/membraneProperties/CaRChansN/CaR/m/q" scale="1"  color="#668800" timeScale="1ms"/>
        <Line id="CaR_h" quantity="sspnPop[0]/biophys/membraneProperties/CaRChansN/CaR/h/q" scale="1"  color="#007700" timeScale="1ms"/>
    </Display>

    <Display id="d4" title="AB example: small currents" timeScale="1ms" xmin="-20" xmax="270" ymin="-0.25" ymax="0.25">
        <Line id="naF_i" quantity="sspnPop[0]/biophys/membraneProperties/naFChans/i" scale="1nA"  color="#00aa00" timeScale="1ms"/>
        <Line id="kIR_i" quantity="sspnPop[0]/biophys/membraneProperties/kIRChans/i" scale="1nA"  color="#3a0f3a" timeScale="1ms"/>
        <Line id="kAs_i" quantity="sspnPop[0]/biophys/membraneProperties/kAsChans/i" scale="1nA"  color="#4444aa" timeScale="1ms"/>
    </Display>

    <Display id="d3" title="AB example: large currents" timeScale="1ms" xmin="-20" xmax="270" ymin="-0.7" ymax="0.4">
        <Line id="pulseGen1_i" quantity="sspnPop[0]/pulseGen1/i" scale="1nA"  color="#000000" timeScale="1ms"/>
        <Line id="kAf_i" quantity="sspnPop[0]/biophys/membraneProperties/kAfChans/i" scale="1nA"  color="#00aaaa" timeScale="1ms"/>
        <Line id="kDr_i" quantity="sspnPop[0]/biophys/membraneProperties/kDrChans/i" scale="1nA"  color="#aa00aa" timeScale="1ms"/>
    </Display>

    <Display id="d5" title="AB example: concentration" timeScale="1ms" xmin="-20" xmax="270" ymin="-0.1" ymax="2.1">
        <Line id="caConcExt" quantity="sspnPop[0]/caConcExt" scale="1 mM"  color="#ff00ff" timeScale="1ms"/>
        <Line id="caConc" quantity="sspnPop[0]/caConc" scale="1 mM"  color="#ffffff" timeScale="1ms"/>
    </Display>
<!--
    <Display id="d6" title="AB example: effective reversal potential" timeScale="1ms">
        <Line id="li14n" quantity="sspnPop[0]/biophys/membraneProperties/CaRChansN/erev" scale="1 mV"  color="#ff00ff" save="erevN.dat"/>
    </Display>-->

</Simulation>

</Lems>
