<?xml version="1.0" encoding="UTF-8"?>

<neuroml xmlns="http://www.neuroml.org/schema/neuroml2"
	    xmlns:xsi="http://www.w3.org/2001/XMLSchema-instance"
        xsi:schemaLocation="http://www.neuroml.org/schema/neuroml2 ../Schemas/NeuroML2/NeuroML_v2beta4.xsd"
	    id="NML2_MScell">

<!--NeuroML version of MScelltapershortCM3noproto.p used in genesis
In the .p file, x is interpreted as length, because y and z are 0, so it can't be visualized
In this .nml file, x and y are given values to produce correct length, and
allow the morphology to be visualized (sort of)

This is an updated version of the model that will when finished contain updated data and will
be amenable with the latest version of the MOOSE simulator. The current version of the NML2 reader
in the MOOSE simulator is only amenable to Python version 2, but the developers hope to make this
compatible with Python version 3 soon

This version also contains an update to the morphology such that it matches the diameters and tapering of MScelltaperspines.p that is currently on github (last updated 06/01/18).

This will first be tested without calcium channels, and then calcium channels will be added over time once the MOOSE developers figure out how to implement the CaPool appropriately as defined from NML2 -->

<!--
<include href="CaPool.nml"/>
<include href="SKchannel2.nml"/>
<include href="CaT_chanREqfact.nml"/>
<include href="CaL12_chanREqfact.nml"/>
<include href="CaL13_chanREqfact.nml"/>
<include href="CaN_chanREqfact.nml"/>
<include href="CaR_chanREqfact.nml"/>
-->
<include href="kAf_chanREqfact.nml"/>
<include href="kAs_chanREqfact.nml"/>
<include href="kIR_chanRE2.nml"/>
<include href="Krp_chanREqfact.nml"/>
<include href="naFchanOgeqn.nml"/>
<include href="pas.channel.nml"/>

<cell id='MScell'>

        <morphology id="MScell_Morphology">

            <segment id ="0" name="Soma">
                <proximal x="0" y="0" z="0" diameter="22.6274"/>
                <distal x="11.3137" y="0" z="0" diameter="22.6274"/>
            </segment>

            <segment id ="1" name="primdend1">
                <parent segment="0"/>
                <proximal x="11.3137" y="0" z="0" diameter="2.25"/>
                <distal x="18" y="5" z="0" diameter="2.25"/>
            </segment>

            <segment id ="2" name="primdend2">
                <parent segment="0"/>
                <proximal x="11.3137" y="0" z="0" diameter="2.25"/>
                <distal x="18" y="-5" z="0" diameter="2.25"/>
            </segment>

            <segment id ="3" name="primdend3">
                <parent segment="0"/>
                <proximal x="11.3137" y="0" z="0" diameter="2.25"/>
                <distal x="-18" y="5" z="0" diameter="2.25"/>
            </segment>

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
            <segmentGroup id="proximal">
                <member segment="0"/>
                <member segment="1"/>
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            </segmentGroup>
<!-- need to be able to define segment group based on distance-->
            <segmentGroup id="middle">
                <member segment="5"/>
                <member segment="6"/>
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            </segmentGroup>
            <segmentGroup id="distal">
		<member segment="14"/>
                <member segment="15"/>
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            </segmentGroup>

        </morphology>

<!--Need ability to create segment group based on distance from soma
also, need to apply this to parts of segments, i.e., segments that will be subdivided.  Else, this morphology will have different channel densities than the non Concise morphology -->

<biophysicalProperties id="biophys">

            <membraneProperties>

                <!-- Values calculated from original soma G * SA / single channel cond. -->
		<!-- We are including the leak channel here because NeuroML is built to be utilized by any simulation environment, and currently the most popular simulators are NEURON, GENESIS, and MOOSE. In NEURON, the passive channel contains the membrane resistance, and so the way in which NML is defined one must create a passive channel to be able to declare membrane resistances for each compartment that will be loaded in. Thus why we are including a passive channel declaration in the NML as this will be needed for loading into MOOSE -->

		<channelDensity ionChannel="pas" id="pas_all"  condDensity = "0.20641 S_per_m2" ion="non_specific" erev="-79.2 mV"/>

                <channelDensity id="kIRChans" ionChannel="kIR" condDensity = "12.7875 S_per_m2" erev="-90mV" ion="k" segmentGroup="proximal"/>
		<channelDensity id="kIRChans" ionChannel="kIR" condDensity = "12.7875 S_per_m2" erev="-90mV" ion="k" segmentGroup="middle"/>
		<channelDensity id="kIRChans" ionChannel="kIR" condDensity = "12.7875 S_per_m2" erev="-90mV" ion="k" segmentGroup="distal"/>

		<channelDensity id="naFChans" ionChannel="naF" condDensity = "229400 S_per_m2" erev="50mV" ion="na" segmentGroup="proximal"/>
		<channelDensity id="naFChans" ionChannel="naF" condDensity = "4080.6 S_per_m2" erev="50mV" ion="na" segmentGroup="middle"/>
		<channelDensity id="naFChans" ionChannel="naF" condDensity = "705.49 S_per_m2" erev="50mV" ion="na" segmentGroup="distal"/>

		<channelDensity id="kAfChans" ionChannel="kAf" condDensity = "1430.85 S_per_m2" erev="-90mV" ion="k" segmentGroup="proximal"/>
		<channelDensity id="kAfChans" ionChannel="kAf" condDensity = "406.796 S_per_m2" erev="-90mV" ion="k" segmentGroup="middle"/>
		<channelDensity id="kAfChans" ionChannel="kAf" condDensity = "91.140 S_per_m2" erev="-90mV" ion="k" segmentGroup="distal"/>

		<channelDensity id="kAsChans" ionChannel="kAs" condDensity = "13.95 S_per_m2" erev="-90mV" ion="k" segmentGroup="proximal"/>
		<channelDensity id="kAsChans" ionChannel="kAs" condDensity = "1419.54 S_per_m2" erev="-90mV" ion="k" segmentGroup="middle"/>
		<channelDensity id="kAsChans" ionChannel="kAs" condDensity = "62.524 S_per_m2" erev="-90mV" ion="k" segmentGroup="distal"/>

		<channelDensity id="KrpChans" ionChannel="Krp" condDensity = "0.0266 S_per_m2" erev="-90mV" ion="k" segmentGroup="proximal"/>
		<channelDensity id="KrpChans" ionChannel="Krp" condDensity = "0.0740 S_per_m2" erev="-90mV" ion="k" segmentGroup="middle"/>
		<channelDensity id="KrpChans" ionChannel="Krp" condDensity = "0.02746 S_per_m2" erev="-90mV" ion="k" segmentGroup="distal"/>

<!--
		<channelDensity id="CaTChans" ionChannel="CaT" condDensity = "0 S_per_m2" erev="140mV" ion="ca" segmentGroup="proximal"/>
		<channelDensity id="CaTChans" ionChannel="CaT" condDensity = "0.000002853 S_per_m2" erev="140mV" ion="ca" segmentGroup="middle"/>
		<channelDensity id="CaTChans" ionChannel="CaT" condDensity = "0.000001434 S_per_m2" erev="140mV" ion="ca" segmentGroup="distal"/>

		<channelDensity id="CaNChans" ionChannel="CaN" condDensity = "0.000002523 S_per_m2" erev="140mV" ion="ca" segmentGroup="proximal"/>
		<channelDensity id="CaNChans" ionChannel="CaN" condDensity = "0 S_per_m2" erev="140mV" ion="ca" segmentGroup="middle"/>
		<channelDensity id="CaNChans" ionChannel="CaN" condDensity = "0 S_per_m2" erev="140mV" ion="ca" segmentGroup="distal"/>

		<channelDensity id="CaRChans" ionChannel="CaR" condDensity = "0.000003722 S_per_m2" erev="140mV" ion="ca" segmentGroup="proximal"/>
		<channelDensity id="CaRChans" ionChannel="CaR" condDensity = "0.000001754 S_per_m2" erev="140mV" ion="ca" segmentGroup="middle"/>
		<channelDensity id="CaRChans" ionChannel="CaR" condDensity = "0.000016292 S_per_m2" erev="140mV" ion="ca" segmentGroup="distal"/>

		<channelDensity id="CaL12Chans" ionChannel="CaL12" condDensity = "0.000034954 S_per_m2" erev="140mV" ion="ca" segmentGroup="proximal"/>
		<channelDensity id="CaL12Chans" ionChannel="CaL12" condDensity = "0.000002591 S_per_m2" erev="140mV" ion="ca" segmentGroup="middle"/>
		<channelDensity id="CaL12Chans" ionChannel="CaL12" condDensity = "0.000002075 S_per_m2" erev="140mV" ion="ca" segmentGroup="distal"/>

                <channelDensity id="CaL13Chans" ionChannel="CaL13" condDensity = "0.000005899 S_per_m2" erev="140mV" ion="ca" segmentGroup="proximal"/>
		<channelDensity id="CaL13Chans" ionChannel="CaL13" condDensity = "0.000001404 S_per_m2" erev="140mV" ion="ca" segmentGroup="middle"/>
		<channelDensity id="CaL13Chans" ionChannel="CaL13" condDensity = "0.000000734 S_per_m2" erev="140mV" ion="ca" segmentGroup="distal"/>

                <channelDensity id="SKCaChans" ionChannel="SKCa" condDensity = "1.4664 S_per_m2" erev="-90mV" ion="k" segmentGroup="proximal"/>
		<channelDensity id="SKCaChans" ionChannel="SKCa" condDensity = "1.4664 S_per_m2" erev="-90mV" ion="k" segmentGroup="middle"/>
		<channelDensity id="SKCaChans" ionChannel="SKCa" condDensity = "1.4664 S_per_m2" erev="-90mV" ion="k" segmentGroup="distal"/>

-->

                <!--channelDensityNernst id="CaRChansN" ionChannel="CaR" ion="ca" condDensity="200 S_per_m2"/ -->

                <!--<channelPopulationNernst id="CaRChansN" ionChannel="CaR" number="0" ion="ca"/>

                <channelPopulationGHK    id="CaRChansG" ionChannel="CaR" number="16000" ion="ca"/>-->

                <spikeThresh value="0 mV"/> <!--PG: Put it back in, as it crashed otherwise...-->

                <specificCapacitance value="0.03 F_per_m2"/> <!--compensate for no spines -->

                <initMembPotential value="-86mV"/>
            </membraneProperties>

            <intracellularProperties>

                <resistivity value="1.921 ohm_m"/>  <!-- Used for specific axial resistance -->

            </intracellularProperties>

        </biophysicalProperties>

</cell>

<network id="net1">
    <population id="MScellpop" component="MScell" size="1"/>
</network>

</neuroml>
