<?xml version="1.0" encoding="UTF-8"?>

<neuroml xmlns="http://www.neuroml.org/schema/neuroml2"
	 xmlns:xsi="http://www.w3.org/2001/XMLSchema-instance"
	 xsi:schemaLocation="http://www.neuroml.org/schema/neuroml2 ../Schemas/NeuroML2/NeuroML_v2beta4.xsd"
	 id="SKCa">

    <ionChannel id = "SKCa" conductance = "10pS" type = "ionChannelHH" species = "k">
        <notes>SK type of Calcium dependent K channel - no voltage dependence</notes>

        <gate id = "z" type = "gateHHtauInf" instances = "1">
            <q10Settings type="q10ExpTemp" q10Factor = "1" experimentalTemp = "20.0 degC"/>-->
	    <!-- if q10Factor > 1, then time constant will be divided by q10 for every 10 degrees -->
            <timeCourse type="SKCa_z_tau_tau" tau="4.9ms"/>

	    <!--timeCourse type="SKCa_z_tau_tau"/-->
            <steadyState type="SKCa_z_inf_inf"/>
        </gate>

    </ionChannel>

    <!--<ComponentType name = "SKCa_z_tau_tau" extends = "baseVoltageConcDepTime">
        <Constant name="tau" dimension="time" value="4.9ms"/>
        <Behavior>
            <DerivedVariable name = "t" exposure = "t" dimension = "time" value = "tau"/>
        </Behavior>
    </ComponentType>-->

    <ComponentType name = "SKCa_z_inf_inf" extends = "baseVoltageConcDepVariable">
        <Constant name="midpoint" dimension="concentration" value="0.57e-3 mM"/>
        <Constant name="HillCoef" dimension="none" value="5.2"/>
        <Behavior>
            <DerivedVariable name = "x" exposure = "x" dimension = "none" value = "CaPool^HillCoef / (CaPool^HillCoef + midpoint^HillCoef)"/>
        </Behavior>
    </ComponentType>

</neuroml>

<!--

   <ionChannel id="SKCa" conductance="10pS" type="ionChannelHH" species="k">

        <notes>Small-conductance, Ca2+ activated K+ current

Comment from original mod file:
: SK-type calcium-activated potassium current
: Reference : Kohler et al. 1996</notes>

        <annotation>
            <rdf:RDF xmlns:rdf="http://www.w3.org/1999/02/22-rdf-syntax-ns#">
                <rdf:Description rdf:about="SKCa">

                    <bqmodel:isDescribedBy xmlns:bqmodel="http://biomodels.net/model-qualifiers/">
                        <rdf:Bag>
                            <rdf:li>Models of Neocortical Layer 5b Pyramidal Cells Capturing a Wide Range of Dendritic and Perisomatic Active Properties,
            Etay Hay, Sean Hill, Felix Schürmann, Henry Markram and Idan Segev, PLoS Comp Biol 2011</rdf:li>
                            <rdf:li rdf:resource="http://www.ncbi.nlm.nih.gov/pubmed/21829333"/>
                        </rdf:Bag>
                    </bqmodel:isDescribedBy>

                    <bqbiol:isVersionOf xmlns:bqbiol="http://biomodels.net/biology-qualifiers/">
                        <rdf:Bag>
                            <rdf:li>K channels</rdf:li>
                            <rdf:li rdf:resource="http://senselab.med.yale.edu/neurondb/channelGene2.aspx#table3"/>
                        </rdf:Bag>
                    </bqbiol:isVersionOf>

                </rdf:Description>
            </rdf:RDF>
        </annotation>

        <gate id="z" type="gateHHtauInf" instances="1">
            <timeCourse type="SK_z_tau_tau"/>
            <steadyState type="SK_z_inf_inf"/>
        </gate>

    </ionChannel>

    <ComponentType name="SK_z_tau_tau" extends="baseVoltageConcDepTime">
        <Constant name="TIME_SCALE" dimension="time" value="1 ms"/>
        <Constant name="VOLT_SCALE" dimension="voltage" value="1 mV"/>
        <Constant name="CONC_SCALE" dimension="concentration" value="1 mol_per_cm3"/>

        <Dynamics>
            <DerivedVariable name="V" dimension="none" value="v / VOLT_SCALE"/>
            <DerivedVariable name="ca_conc" dimension="none" value="CaPool / CONC_SCALE"/>
            <DerivedVariable name="t" exposure="t" dimension="time" value="(1) * TIME_SCALE"/>
        </Dynamics>

    </ComponentType>

    <ComponentType name="SK_z_inf_inf" extends="baseVoltageConcDepVariable">
        <Constant name="TIME_SCALE" dimension="time" value="1 ms"/>
        <Constant name="VOLT_SCALE" dimension="voltage" value="1 mV"/>
        <Constant name="CONC_SCALE" dimension="concentration" value="1 mol_per_cm3"/>

        <Dynamics>
            <DerivedVariable name="V" dimension="none" value="v / VOLT_SCALE"/>
            <DerivedVariable name="ca_conc" dimension="none" value="CaPool / CONC_SCALE"/>
            <DerivedVariable name="x" exposure="x" dimension="none" value="1/(1+(4.3e-10/ca_conc)**4.8)"/>
        </Dynamics>

    </ComponentType>

-->
