<neuroml xmlns="http://www.neuroml.org/schema/neuroml2"  xmlns:xs="http://www.w3.org/2001/XMLSchema" xmlns:xsi="http://www.w3.org/2001/XMLSchema-instance" xsi:schemaLocation="http://www.neuroml.org/schema/neuroml2 https://raw.github.com/NeuroML/NeuroML2/development/Schemas/NeuroML2/NeuroML_v2beta5.xsd" id="NML2_MScell">
    <ionChannel id="passive" type="ionChannelPassive" conductance="10pS"/>
    <ionChannel id="SKCa" species="k" type="ionChannelHH" conductance="10pS">
        <notes>Small-conductance, Ca2+ activated K+ current

Comment from original mod file:
: SK-type calcium-activated potassium current
: Reference : Kohler et al. 1996</notes>
        <gate id="z" instances="1" type="gateHHtauInf">
            <timeCourse type="SK_z_tau_tau"/>
            <steadyState type="SK_z_inf_inf"/>
        </gate>
    </ionChannel>
    <decayingPoolConcentrationModel id="CaPool" ion="ca" restingConc="5e-5 mM" decayConstant="10.0 ms" shellThickness="8.4E-6 cm"/>
    <cell id="MScell">
        <morphology id="MScell_Morphology">
            <segment id="0" name="Soma">
                <proximal x="-8.000000e+00" y="0.000000e+00" z="0.000000e+00" diameter="16.0"/>
                <distal x="8.000000e+00" y="0.000000e+00" z="0.000000e+00" diameter="16.0"/>
            </segment>
            <segment id="1" name="primdend1">
                <parent segment="0"/>
                <proximal x="8.000000e+00" y="5.000000e+00" z="0.000000e+00" diameter="2.5"/>
                <distal x="1.800000e+01" y="5.000000e+00" z="0.000000e+00" diameter="2.5"/>
            </segment>
            <segment id="2" name="primdend2">
                <parent segment="0"/>
                <proximal x="8.000000e+00" y="-5.000000e+00" z="0.000000e+00" diameter="2.5"/>
                <distal x="1.800000e+01" y="-5.000000e+00" z="0.000000e+00" diameter="2.5"/>
            </segment>
            <segment id="3" name="primdend3">
                <parent segment="0"/>
                <proximal x="-8.000000e+00" y="5.000000e+00" z="0.000000e+00" diameter="2.5"/>
                <distal x="-1.800000e+01" y="5.000000e+00" z="0.000000e+00" diameter="2.5"/>
            </segment>
            <segment id="4" name="primdend4">
                <parent segment="0"/>
                <proximal x="-8.000000e+00" y="-5.000000e+00" z="0.000000e+00" diameter="2.5"/>
                <distal x="-1.800000e+01" y="-5.000000e+00" z="0.000000e+00" diameter="2.5"/>
            </segment>
            <segment id="5" name="secdend11">
                <parent segment="1"/>
                <proximal x="1.800000e+01" y="4.400000e+00" z="0.000000e+00" diameter="1.2"/>
                <distal x="3.000000e+01" y="4.400000e+00" z="0.000000e+00" diameter="1.2"/>
            </segment>
            <segment id="6" name="secdend12">
                <parent segment="1"/>
                <proximal x="1.800000e+01" y="5.600000e+00" z="0.000000e+00" diameter="1.2"/>
                <distal x="3.000000e+01" y="5.600000e+00" z="0.000000e+00" diameter="1.2"/>
            </segment>
            <segment id="7" name="secdend21">
                <parent segment="2"/>
                <proximal x="1.800000e+01" y="-4.400000e+00" z="0.000000e+00" diameter="1.2"/>
                <distal x="3.000000e+01" y="-4.400000e+00" z="0.000000e+00" diameter="1.2"/>
            </segment>
            <segment id="8" name="secdend22">
                <parent segment="2"/>
                <proximal x="1.800000e+01" y="-5.600000e+00" z="0.000000e+00" diameter="1.2"/>
                <distal x="3.000000e+01" y="-5.600000e+00" z="0.000000e+00" diameter="1.2"/>
            </segment>
            <segment id="9" name="secdend31">
                <parent segment="3"/>
                <proximal x="-1.800000e+01" y="4.400000e+00" z="0.000000e+00" diameter="1.2"/>
                <distal x="-3.000000e+01" y="4.400000e+00" z="0.000000e+00" diameter="1.2"/>
            </segment>
            <segment id="10" name="secdend32">
                <parent segment="3"/>
                <proximal x="-1.800000e+01" y="5.600000e+00" z="0.000000e+00" diameter="1.2"/>
                <distal x="-3.000000e+01" y="5.600000e+00" z="0.000000e+00" diameter="1.2"/>
            </segment>
            <segment id="11" name="secdend41">
                <parent segment="4"/>
                <proximal x="-1.800000e+01" y="-4.400000e+00" z="0.000000e+00" diameter="1.2"/>
                <distal x="-3.000000e+01" y="-4.400000e+00" z="0.000000e+00" diameter="1.2"/>
            </segment>
            <segment id="12" name="secdend42">
                <parent segment="4"/>
                <proximal x="-1.800000e+01" y="-5.600000e+00" z="0.000000e+00" diameter="1.2"/>
                <distal x="-3.000000e+01" y="-5.600000e+00" z="0.000000e+00" diameter="1.2"/>
            </segment>
            <segment id="13" name="tertdend1">
                <parent segment="5"/>
                <proximal x="3.000000e+01" y="4.100000e+00" z="0.000000e+00" diameter="0.8"/>
                <distal x="2.280000e+02" y="4.100000e+00" z="0.000000e+00" diameter="0.7"/>
            </segment>
            <segment id="14" name="tertdend2">
                <parent segment="5"/>
                <proximal x="3.000000e+01" y="4.700000e+00" z="0.000000e+00" diameter="0.8"/>
                <distal x="2.280000e+02" y="4.700000e+00" z="0.000000e+00" diameter="0.7"/>
            </segment>
            <segment id="15" name="tertdend3">
                <parent segment="6"/>
                <proximal x="3.000000e+01" y="5.300000e+00" z="0.000000e+00" diameter="0.8"/>
                <distal x="2.280000e+02" y="5.300000e+00" z="0.000000e+00" diameter="0.7"/>
            </segment>
            <segment id="16" name="tertdend4">
                <parent segment="6"/>
                <proximal x="3.000000e+01" y="5.900000e+00" z="0.000000e+00" diameter="0.8"/>
                <distal x="2.280000e+02" y="5.900000e+00" z="0.000000e+00" diameter="0.7"/>
            </segment>
            <segment id="17" name="tertdend5">
                <parent segment="7"/>
                <proximal x="3.000000e+01" y="-4.100000e+00" z="0.000000e+00" diameter="0.8"/>
                <distal x="2.280000e+02" y="-4.100000e+00" z="0.000000e+00" diameter="0.7"/>
            </segment>
            <segment id="18" name="tertdend6">
                <parent segment="7"/>
                <proximal x="3.000000e+01" y="-4.700000e+00" z="0.000000e+00" diameter="0.8"/>
                <distal x="2.280000e+02" y="-4.700000e+00" z="0.000000e+00" diameter="0.7"/>
            </segment>
            <segment id="19" name="tertdend7">
                <parent segment="8"/>
                <proximal x="3.000000e+01" y="-5.300000e+00" z="0.000000e+00" diameter="0.8"/>
                <distal x="2.280000e+02" y="-5.300000e+00" z="0.000000e+00" diameter="0.7"/>
            </segment>
            <segment id="20" name="tertdend8">
                <parent segment="8"/>
                <proximal x="3.000000e+01" y="-5.900000e+00" z="0.000000e+00" diameter="0.8"/>
                <distal x="2.280000e+02" y="-5.900000e+00" z="0.000000e+00" diameter="0.7"/>
            </segment>
            <segment id="21" name="tertdend9">
                <parent segment="9"/>
                <proximal x="-3.000000e+01" y="4.100000e+00" z="0.000000e+00" diameter="0.8"/>
                <distal x="-2.280000e+02" y="4.100000e+00" z="0.000000e+00" diameter="0.7"/>
            </segment>
            <segment id="22" name="tertden10">
                <parent segment="9"/>
                <proximal x="-3.000000e+01" y="4.700000e+00" z="0.000000e+00" diameter="0.8"/>
                <distal x="-2.280000e+02" y="4.700000e+00" z="0.000000e+00" diameter="0.7"/>
            </segment>
            <segment id="23" name="tertdend11">
                <parent segment="10"/>
                <proximal x="-3.000000e+01" y="5.300000e+00" z="0.000000e+00" diameter="0.8"/>
                <distal x="-2.280000e+02" y="5.300000e+00" z="0.000000e+00" diameter="0.7"/>
            </segment>
            <segment id="24" name="tertdend12">
                <parent segment="10"/>
                <proximal x="-3.000000e+01" y="5.900000e+00" z="0.000000e+00" diameter="0.8"/>
                <distal x="-2.280000e+02" y="5.900000e+00" z="0.000000e+00" diameter="0.7"/>
            </segment>
            <segment id="25" name="tertdend13">
                <parent segment="11"/>
                <proximal x="-3.000000e+01" y="-4.100000e+00" z="0.000000e+00" diameter="0.8"/>
                <distal x="-2.280000e+02" y="-4.100000e+00" z="0.000000e+00" diameter="0.7"/>
            </segment>
            <segment id="26" name="tertdend14">
                <parent segment="11"/>
                <proximal x="-3.000000e+01" y="-4.700000e+00" z="0.000000e+00" diameter="0.8"/>
                <distal x="-2.280000e+02" y="-4.700000e+00" z="0.000000e+00" diameter="0.7"/>
            </segment>
            <segment id="27" name="tertdend15">
                <parent segment="12"/>
                <proximal x="-3.000000e+01" y="-5.300000e+00" z="0.000000e+00" diameter="0.8"/>
                <distal x="-2.280000e+02" y="-5.300000e+00" z="0.000000e+00" diameter="0.7"/>
            </segment>
            <segment id="28" name="tertdend16">
                <parent segment="12"/>
                <proximal x="-3.000000e+01" y="-5.900000e+00" z="0.000000e+00" diameter="0.8"/>
                <distal x="-2.280000e+02" y="-5.900000e+00" z="0.000000e+00" diameter="0.7"/>
            </segment>
            <segmentGroup id="proximal">
                <member segment="0"/>
                <member segment="1"/>
                <member segment="2"/>
                <member segment="3"/>
                <member segment="4"/>
            </segmentGroup>
            <segmentGroup id="middle">
                <member segment="5"/>
                <member segment="6"/>
                <member segment="7"/>
                <member segment="8"/>
                <member segment="9"/>
                <member segment="10"/>
                <member segment="11"/>
                <member segment="12"/>
            </segmentGroup>
            <segmentGroup id="distal">
                <member segment="13"/>
                <member segment="14"/>
                <member segment="15"/>
                <member segment="16"/>
                <member segment="17"/>
                <member segment="18"/>
                <member segment="19"/>
                <member segment="20"/>
                <member segment="21"/>
                <member segment="22"/>
                <member segment="23"/>
                <member segment="24"/>
                <member segment="25"/>
                <member segment="26"/>
                <member segment="27"/>
                <member segment="28"/>
            </segmentGroup>
        </morphology>
        <biophysicalProperties id="biophys">
            <membraneProperties>
                <channelPopulation id="leak" ionChannel="passive" number="29" erev="-60mV" ion="non_specific"/>
                <spikeThresh value="0 mV"/>
                <specificCapacitance value="0.03 F_per_m2"/>
                <initMembPotential value="-85mV"/>
            </membraneProperties>
            <intracellularProperties>
                <resistivity value="1.0 ohm_m"/>
            </intracellularProperties>
        </biophysicalProperties>
    </cell>
    <network id="net1">
        <population id="MScellpop" component="MScell" size="1"/>
    </network>
    <ComponentType name="SK_z_tau_tau" extends="baseVoltageConcDepTime">
        <Dynamics>
            <DerivedVariable name="t" dimension="time" exposure="t" value="1"/>
        </Dynamics>
    </ComponentType>
    <ComponentType name="SK_z_inf_inf" extends="baseVoltageConcDepVariable">
        <Dynamics>
            <DerivedVariable name="x" dimension="none" exposure="x" value="1/(1+(4.3e-10/CaPool)**4.8)"/>
        </Dynamics>
    </ComponentType>
</neuroml>
